// COMSOL Multiphysics 6.1.0.357 model "part3.mph"
// Outline of the model tree

Geometry
  geom1 "Geometry 1" (2D, length unit m)
    r1: Rectangle | size = {12, 5}
    fin: Finalize "Form Union"

Physics
  poeq: PoissonEquation "Poisson's Equation" on all domains
    dependent variable u
    EquationForm.form = Automatic
    peq1: PoissonEquation "Poisson's Equation 1" (default) | f = 100*exp(-0.5*(x-4)^2 - 4 * (y - 1)^2)
    zflx1: ZeroFluxBoundary "Zero Flux 1" (default)
    init1: init "Initial Values 1" (default)
    dir1: DirichletBoundary "Dirichlet Boundary Condition 1" on boundaries 2 | r = 25

Mesh
  mesh1 "Mesh 1" (physics-controlled)
    size: MeshSizeDefault | hauto = 1

Studies
  std1 "Study 1"
    stat: Stationary

Solver configurations
  sol1 "Solution 1" (study std1)
    v1: Variables "Dependent Variables 1"
    s1: Stationary "Stationary Solver 1"
      dDef: Direct
      fc1: FullyCoupled | linsolver = dDef

Datasets
  dset1: Solution | solution = sol1
  cpt1: CutPoint2D | data = dset1; pointx = 6; pointy = 2

Derived values
  pev1: EvalPoint "Point Evaluation 1" | data = cpt1; table = tbl1; expr = u

Tables
  tbl1: Table
    // Point Evaluation 1
    Dependent variable u (1), Point: (6, 2) | Dependent variable u (1), Point: (6, 2) | Dependent variable u (1), Point: (6, 2)
    47.0936 | 47.2258 | 47.2254

Plots
  pg1: PlotGroup2D "Poisson's Equation" | data = dset1
    surf1: Surface | expr = u